// COMSOL Multiphysics 6.4.0.429 model "Final 15.mph"
// Outline of the model tree

Parameters
  Rp = 5[mm]
  tp = 2.5[mm]
  g = 10[um]
  Rc = 5[mm]
  Lc = 25[mm]
  rci = 6[mm]
  rco = 11[mm]
  hco = 12[mm]
  Rair = 60[mm]
  Hair = 80[mm]
  Pheat = 20[W]
  Tinf = 293.15[K]
  hconv = 10[W/(K*m^2)]
  eps0 = 0.8
  IC = 3[A]
  NC = 100
  Tc = 700[K]
  dT = 10[K]
  mup0 = 5000

Functions
  an1: Analytic "Analtytic fc" | funcname = s; expr = 1/(1+exp((T-Tc)/dT)); args = T; fununit = 1; argunit = K

Variables
  var1 "Variables 1"
    mur_iron = 1+(mup0-1)*s(T)

Geometry
  geom1 "Geometry 1" (2D axisymmetric, length unit m)
    r1: Rectangle | size = {Rp, tp}
    r2: Rectangle | size = {Rc, Lc}; pos = {0, tp}
    r3: Rectangle | size = {rco-rci, hco}; pos = {rci, tp+Lc-hco}
    r4: Rectangle "Air" | size = {Rair, Hair}; pos = {0, -20[mm]}
    fin: Finalize "Form Union" | symmetriccoord = 8

Materials
  mat1: Common "Very cool Material" on domains 2, 3
    def: def "Basic"
      relpermeability = mur_iron
      relpermittivity = 1
      density = 7870
      heatcapacity = 450
      thermalconductivity = 80
      electricconductivity = 1E7
  mat2: Common "Air" on domains 1
    def: def "Basic"
      thermalexpansioncoefficient = alpha_p(pA,T)
      molarmass = 0.02897[kg/mol]
      bulkviscosity = muB(T)
      relpermeability = 1
      relpermittivity = 1
      dynamicviscosity = eta(T)
      ratioofspecificheat = 1.4
      electricconductivity = 0[S/m]
      heatcapacity = Cp(T)
      density = rho(pA,T)
      thermalconductivity = k(T)
      soundspeed = cs(T)
      eta: Piecewise | arg = T; pieces = {200.0, 1600.0, -8.38278E-7+8.35717342E-8*T^1-7.69429583E-11*T^2+4.6437266E-14*T^3-1.06585607E-17*T^4}; argunit = K; fununit = Pa*s
      Cp: Piecewise | arg = T; pieces = {200.0, 1600.0, 1047.63657-0.372589265*T^1+9.45304214E-4*T^2-6.02409443E-7*T^3+1.2858961E-10*T^4}; argunit = K; fununit = J/(kg*K)
      rho: Analytic | expr = pA*0.02897/R_const[K*mol/J]/T; args = {pA, T}; fununit = kg/m^3; argunit = {Pa, K}
      k: Piecewise | arg = T; pieces = {200.0, 1600.0, -0.00227583562+1.15480022E-4*T^1-7.90252856E-8*T^2+4.11702505E-11*T^3-7.43864331E-15*T^4}; argunit = K; fununit = W/(m*K)
      cs: Analytic | expr = sqrt(1.4*R_const[K*mol/J]/0.02897*T); args = T; fununit = m/s; argunit = K
      an1: Analytic | funcname = alpha_p; expr = -1/rho(pA,T)*d(rho(pA,T),T); args = {pA, T}; fununit = 1/K; argunit = {Pa, K}
      an2: Analytic "Analytic 2a" | funcname = muB; expr = 0.6*eta(T); args = T; fununit = Pa*s; argunit = K
    RefractiveIndex: RefractiveIndex
      n = 1
      ki = 0
    NonlinearModel: NonlinearModel
      BA = def.gamma-1
    idealGas: idealGas
      Rs = R_const/Mn
      heatcapacity = Cp(T)
      ratioofspecificheat = 1.4
      molarmass = 0.02897[kg/mol]
      Cp: Piecewise | arg = T; pieces = {200.0, 1600.0, 1047.63657-0.372589265*T^1+9.45304214E-4*T^2-6.02409443E-7*T^3+1.2858961E-10*T^4}; argunit = K; fununit = J/(kg*K)
  mat3: Common "Copper" on domains 4
    def: def "Basic"
      relpermeability = 1
      electricconductivity = 5.998e7[S/m]
      thermalexpansioncoefficient = 17e-6[1/K]
      heatcapacity = 385[J/(kg*K)]
      relpermittivity = 1
      density = 8960[kg/m^3]
      thermalconductivity = 400[W/(m*K)]
    Enu: Enu "Young's modulus and Poisson's ratio"
      E = 110[GPa]
      nu = 0.35
    linzRes: linzRes "Linearized resistivity"
      rho0 = 1.72e-8[ohm*m]
      alpha = 0.0039[1/K]
      Tref = 298[K]

Physics
  ht: HeatTransferInSolidsAndFluids on domains 2-4
    dependent variable T
    solid1: SolidHeatTransferModel "Solid 1" (default)
    fluid1: FluidHeatTransferModel "Fluid 1" on no domains
    init1: init "Initial Values 1" (default)
    axi1: AxialSymmetry (default)
    ins1: ThermalInsulation (default)
    hf1: HeatFluxBoundary "Heat Flux 1" on boundaries 4 | HeatFluxType = HeatRate; P0 = Pheat; materialType = nonSolid
    sar1: SurfaceToAmbientRadiation on boundaries 8, 10, 11 | epsilon_rad_mat = userdef; epsilon_rad = eps0; Tamb = Tinf
    hf2: HeatFluxBoundary "Heat Flux 2" on boundaries 8, 10, 11
      HeatFluxType = ConvectiveHeatFlux
      h = hconv
      Text = Tinf
  mf: InductionCurrents "Magnetic Fields" on all domains
    dependent variable A = {Ar, Aphi, Az}
    fsp1: FreeSpace (default)
    axi1: AxialSymmetry (default)
    mi1: MagneticInsulation (default)
    init1: init "Initial Values 1" (default)
    coil1: Coil "Domain Coil 1" on domains 4 | ConductorModel = Litz; ICoil = IC; N = NC
    tg1: ThinLowPermeabilityGap on boundaries 6, 12 | ds = 10[um]; mur_mat = userdef; mur = 1
    fcal1: ForceCalculation on domains 2
    als1: AmperesLawSolid "Ampère's Law in Solids 1" on domains 2, 3

Mesh
  mesh1 "Mesh 1" (physics-controlled)
    size: MeshSizeDefault | hauto = 2

Studies
  std1 "Study 1"
    param: Parametric "Parametric Sweep" | pname = IC; plistarr = range(0,0.25,4); punit = A
    stat: Stationary
  std2 "Study 2"
    time: Transient "Time Dependent" | tlist = range(0,1,400)

Solver configurations
  sol1 "Solution 1" (study std1)
    v1: Variables "Dependent Variables 1"
    s1: Stationary "Stationary Solver 1"
      p1: Parametric
      fc1: FullyCoupled
      d1: Direct "Direct, heat transfer variables (ht) (Merged)"
  sol2 "Solution 2" (study std2)
    v1: Variables "Dependent Variables 1"
    t1: Time "Time-Dependent Solver 1"
      fc1: FullyCoupled
      d1: Direct "Direct, heat transfer variables (ht) (Merged)"

Datasets
  dset1: Solution | solution = sol1
  rev1: Revolve2D "Revolution 2D 1" | data = dset1; revangle = 270
  dset2: Solution | solution = sol2
  rev2: Revolve2D "Revolution 2D 2" | data = dset2; startangle = -90; revangle = 225

Plots
  pg1: PlotGroup2D "Temperature (ht)" | data = dset1
    surf1: Surface | expr = T
  pg2: PlotGroup2D "Magnetic Flux Density (mf)" | data = dset1
    surf1: Surface | expr = mf.normB
    str1: Streamline on boundaries 1-16 | expr = {mf.Br, mf.Bz}
      filt1: Filter | expr = !isScalingSystemDomain
    con1: Contour | expr = mf.Psi; levelrounding = off
      filt1: Filter | expr = !isScalingSystemDomain
  pg3: PlotGroup3D "Magnetic Flux Density, Revolved Geometry (mf)" | data = rev1
    vol1: Volume | expr = mf.normB
    con1: Contour | expr = mf.Psi; levelrounding = off
      filt1: Filter | expr = !isScalingSystemDomain
  pg4: PlotGroup1D "1D Plot Group 4"
    data = dset1
    title = Magnetic force in function of the curent(0...4A)
    ylabel = Electromagnetic force, z-component(mN)
    glob1: Global | expr = mf.Forcez_1*1000; unit = mN
  pg5: PlotGroup2D "Temperature (ht) 1" | data = dset2
    surf1: Surface | expr = T
  pg6: PlotGroup2D "Magnetic Flux Density (mf) 1" | data = dset2
    surf1: Surface | expr = mf.normB
    str1: Streamline on boundaries 1-16 | expr = {mf.Br, mf.Bz}
      filt1: Filter | expr = !isScalingSystemDomain
    con1: Contour | expr = mf.Psi; levelrounding = off
      filt1: Filter | expr = !isScalingSystemDomain
  pg7: PlotGroup3D "Magnetic Flux Density, Revolved Geometry (mf) 1" | data = rev2
    vol1: Volume | expr = mf.normB
    con1: Contour | expr = mf.Psi; levelrounding = off
      filt1: Filter | expr = !isScalingSystemDomain
  pg8: PlotGroup1D "1D Plot Group 8" | data = dset2
    glob1: Global | expr = mf.Forcez_1 - 15.1[mN]; unit = mN; title = Force Difference(mN)
  pg9: PlotGroup3D "3D Plot Group 9" | data = rev1